*include,input=all.msh
*include,input=support.nam
** symmetry at bottom
*boundary
Nsupport,1,3
** material definition
*material, name= Steel
*elastic
130000,0.3,0
*solid section, elset=Eall, material=Steel
*STEP
*STATIC
*dload
*include,input=load.dlo
*el file
S
*node file
U
*end step
